** CalculiX Input - Kragarm
** L=200.0mm, b=30.0mm, h=30.0mm, F=1000.0N, E=210000.0MPa, nu=0.3

*NODE, NSET=NALL
1, 0.000000, 0.000000, 0.000000
2, 10.000000, 0.000000, 0.000000
3, 20.000000, 0.000000, 0.000000
4, 30.000000, 0.000000, 0.000000
5, 40.000000, 0.000000, 0.000000
6, 50.000000, 0.000000, 0.000000
7, 60.000000, 0.000000, 0.000000
8, 70.000000, 0.000000, 0.000000
9, 80.000000, 0.000000, 0.000000
10, 90.000000, 0.000000, 0.000000
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
*ELEMENT, TYPE=C3D8, ELSET=EALL
1, 1, 2, 23, 22, 85, 86, 107, 106
2, 85, 86, 107, 106, 169, 170, 191, 190
3, 169, 170, 191, 190, 253, 254, 275, 274
4, 22, 23, 44, 43, 106, 107, 128, 127
5, 106, 107, 128, 127, 190, 191, 212, 211
6, 190, 191, 212, 211, 274, 275, 296, 295
7, 43, 44, 65, 64, 127, 128, 149, 148
8, 127, 128, 149, 148, 211, 212, 233, 232
9, 211, 212, 233, 232, 295, 296, 317, 316
10, 2, 3, 24, 23, 86, 87, 108, 107
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
*NSET, NSET=FIXED
1, 85, 169, 253, 22, 106, 190, 274,
43, 127, 211, 295, 64, 148, 232, 316,


*NSET, NSET=FORCE
21, 105, 189, 273, 42, 126, 210, 294,
63, 147, 231, 315, 84, 168, 252, 336,


*MATERIAL, NAME=STAHL
*ELASTIC
210000.0, 0.3
*DENSITY
7.9e-9

*SOLID SECTION, ELSET=EALL, MATERIAL=STAHL

*BOUNDARY
FIXED, 1, 3, 0.0

*STEP
*STATIC

*CLOAD
21, 3, -62.500000
105, 3, -62.500000
189, 3, -62.500000
273, 3, -62.500000
42, 3, -62.500000
126, 3, -62.500000
210, 3, -62.500000
294, 3, -62.500000
63, 3, -62.500000
147, 3, -62.500000
231, 3, -62.500000
315, 3, -62.500000
84, 3, -62.500000
168, 3, -62.500000
252, 3, -62.500000
336, 3, -62.500000

*NODE FILE
U
*EL FILE
S

*END STEP
