** CalculiX – Fahrradsattel FEM
** L=270.0  E=7500.0MPa  F=800.0N

*NODE, NSET=NALL
1, -135.0000, -27.5000, 0.0000
2, -135.0000, -27.5000, 6.0000
3, -135.0000, -27.5000, 12.0000
4, -135.0000, -27.5000, 18.0000
5, -135.0000, -22.0000, 0.0000
6, -135.0000, -22.0000, 7.0800
7, -135.0000, -22.0000, 14.1600
8, -135.0000, -22.0000, 21.2400
9, -135.0000, -16.5000, 0.0000
10, -135.0000, -16.5000, 7.9200
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
*ELEMENT, TYPE=C3D8, ELSET=EALL
1, 1,45,49,5,2,46,50,6
2, 2,46,50,6,3,47,51,7
3, 3,47,51,7,4,48,52,8
4, 5,49,53,9,6,50,54,10
5, 6,50,54,10,7,51,55,11
6, 7,51,55,11,8,52,56,12
7, 9,53,57,13,10,54,58,14
8, 10,54,58,14,11,55,59,15
9, 11,55,59,15,12,56,60,16
10, 13,57,61,17,14,58,62,18
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
*NSET, NSET=FIX
509, 513, 641, 637, 645, 277, 281, 409,
285, 413, 541, 289, 417, 545, 293, 421,
549, 425, 553, 557, 321, 325, 453, 329,
457, 585, 333, 461, 589, 337, 465, 593,
469, 597, 601, 249, 233, 237, 365, 505,
241, 369, 497, 633, 245, 373, 501, 629,
377, 381,

*NSET, NSET=LOAD_L
544, 452, 456, 496, 500, 540,

*NSET, NSET=LOAD_R
516, 520, 560, 564, 472, 476,

*NSET, NSET=LOAD_N
64, 160, 68, 72, 108, 112, 156, 20,
116, 24, 28, 152,

*MATERIAL, NAME=SEAT
*ELASTIC
7500.0, 0.35
*DENSITY
1.4e-09

*SOLID SECTION, ELSET=EALL, MATERIAL=SEAT

*BOUNDARY
FIX, 1, 3, 0.0

*STEP
*STATIC

*CLOAD
544, 3, -56.00000
452, 3, -56.00000
456, 3, -56.00000
496, 3, -56.00000
500, 3, -56.00000
540, 3, -56.00000
516, 3, -56.00000
520, 3, -56.00000
560, 3, -56.00000
564, 3, -56.00000
472, 3, -56.00000
476, 3, -56.00000
64, 3, -10.66667
160, 3, -10.66667
68, 3, -10.66667
72, 3, -10.66667
108, 3, -10.66667
112, 3, -10.66667
156, 3, -10.66667
20, 3, -10.66667
116, 3, -10.66667
24, 3, -10.66667
28, 3, -10.66667
152, 3, -10.66667

*NODE FILE
U
*EL FILE
S

*END STEP
